# Core-shell model for NaCl

units 		metal
dimension	3
boundary	p	p	p
atom_style	full

fix csinfo all property/atom i_CSID
read_data data.coreshell fix csinfo NULL CS-Info

neighbor 2.0 bin

kspace_style ewald 1.0e-6
pair_style   born/coul/long/cs 20.0 20.0
pair_coeff   * *      0.0 1.000   0.00  0.00   0.00
pair_coeff   3 3    487.0 0.23768 0.00  1.05   0.50
pair_coeff   3 4 145134.0 0.23768 0.00  6.99   8.70
pair_coeff   4 4 405774.0 0.23768 0.00 72.40 145.40

bond_style harmonic
bond_coeff 1 63.014 0.0
bond_coeff 2 25.724 0.0

thermo 50
thermo_style custom step etotal pe ke temp press

compute CStemp all temp/cs all all

fix thermoberendsen all temp/berendsen 1427 1427 0.4
fix nve all nve

timestep 0.002
run 500

unfix thermoberendsen

run 1000
