# ReaxFF potential for RDX system

units           real

atom_style      charge
read_data       data.rdx

pair_style      reaxff control.reax_c.rdx
pair_coeff      * * ffield.reax C H O N

compute reax all pair reaxff

variable eb      equal c_reax[1]
variable ea      equal c_reax[2]
variable elp     equal c_reax[3]

neighbor        2.5 bin
neigh_modify    every 10 delay 0 check no

fix             1 all nve
fix             2 all qeq/reaxff 1 0.0 10.0 1.0e-6 reaxff

thermo          10
thermo_style    custom step temp epair etotal press &
                v_eb v_ea v_elp

timestep        1.0

run             100
